# OpenSim document version 40000
AnalyzeTool Base:
  replace_force_set: false
  force_set_files: SO_Reserve_Actuators.xml
  results_directory: ../../Results/Base/STO
  output_precision: 8
  initial_time: 0.183
  final_time: 1.385
  solve_for_equilibrium_for_auxiliary_states: false
  maximum_number_of_integrator_steps: 20000
  maximum_integrator_step_size: 1
  minimum_integrator_step_size: 1e-4
  integrator_error_tolerance: 0.001
  external_loads_file: SO_External_Loads.xml
  coordinates_file: ../1_Model/Trial_01_ik.mot
  lowpass_cutoff_frequency_for_coordinates: 6
  # Changed
  # Changed
  AnalysisSet Analyses:
    StaticOptimization: start_time=0.183 end_time=1.385 step_interval=1 in_degrees=true use_model_force_set=true
        activation_exponent=2 use_muscle_physiology=true optimizer_convergence_criterion=0.0001
        optimizer_max_iterations=100
