# OpenSim document version 30000
ForceSet GenericAmputeeModel_Right_ankle_Reserve_Actuators:
  # Actuators on the base segment are called Residual actuators
  # whose forces account for the errors in the model, its kinematic
  # that do not balance with experimental ground reaction forces
  PointActuator FX: body=pelvis point=(-0.034 0 0) point_is_global=false direction=(1 0 0) force_is_global=true
      optimal_force=1
  PointActuator FY: body=pelvis point=(-0.034 0 0) point_is_global=false direction=(0 1 0) force_is_global=true
      optimal_force=1
  TorqueActuator MZ: bodyA=pelvis bodyB=ground torque_is_global=true axis=(0 0 1) optimal_force=1
  # Actuators on the Coordinates are called Reserve actuators
  # and are used the drive the model when the model excludes its muscles (i.e. RRA)
  # or when muscles are insufficient to track desired kinematics (CMC)
  CoordinateActuator pelvis_tilt_reserve: coordinate=pelvis_tilt optimal_force=1
  CoordinateActuator pelvis_list_reserve: coordinate=pelvis_list optimal_force=1
  CoordinateActuator pelvis_rotation_reserve: coordinate=pelvis_rotation optimal_force=1
  CoordinateActuator pelvis_tx_reserve: coordinate=pelvis_tx optimal_force=1
  CoordinateActuator pelvis_ty_reserve: coordinate=pelvis_ty optimal_force=1
  CoordinateActuator pelvis_tz_reserve: coordinate=pelvis_tz optimal_force=1
  CoordinateActuator hip_flexion_r_reserve: coordinate=hip_flexion_r optimal_force=1
  CoordinateActuator hip_adduction_r_reserve: coordinate=hip_adduction_r optimal_force=1
  CoordinateActuator hip_rotation_r_reserve: coordinate=hip_rotation_r optimal_force=1
  CoordinateActuator knee_angle_r_reserve: coordinate=knee_angle_r optimal_force=1
  CoordinateActuator ankle_angle_r_reserve: coordinate=ankle_angle_r optimal_force=1
  CoordinateActuator hip_flexion_l_reserve: coordinate=hip_flexion_l optimal_force=1
  CoordinateActuator hip_adduction_l_reserve: coordinate=hip_adduction_l optimal_force=1
  CoordinateActuator hip_rotation_l_reserve: coordinate=hip_rotation_l optimal_force=1
  CoordinateActuator knee_angle_l_reserve: coordinate=knee_angle_l optimal_force=1
  CoordinateActuator ankle_angle_l_reserve: coordinate=ankle_angle_l optimal_force=1
  CoordinateActuator subtalar_angle_l_reserve: coordinate=subtalar_angle_l optimal_force=1
  CoordinateActuator mtp_angle_l_reserve: coordinate=mtp_angle_l optimal_force=1
  CoordinateActuator lumbar_ext_reserve: coordinate=lumbar_extension optimal_force=10
  CoordinateActuator lumbar_bend_reserve: coordinate=lumbar_bending optimal_force=10
  CoordinateActuator lumbar_rot_reserve: coordinate=lumbar_rotation optimal_force=10
  CoordinateActuator shoulder_flex_r_reserve: coordinate=arm_flex_r optimal_force=10
  CoordinateActuator shoulder_add_r_reserve: coordinate=arm_add_r optimal_force=10
  CoordinateActuator shoulder_rot_r_reserve: coordinate=arm_rot_r optimal_force=10
  CoordinateActuator elbow_flex_r_reserve: coordinate=elbow_flex_r optimal_force=10
  CoordinateActuator pro_sup_r_reserve: coordinate=pro_sup_r optimal_force=10
  CoordinateActuator wrist_flex_r_reserve: coordinate=wrist_flex_r optimal_force=10
  CoordinateActuator wrist_dev_r_reserve: coordinate=wrist_dev_r optimal_force=10
  CoordinateActuator shoulder_flex_l_reserve: coordinate=arm_flex_l optimal_force=10
  CoordinateActuator shoulder_add_l_reserve: coordinate=arm_add_l optimal_force=10
  CoordinateActuator shoulder_rot_l_reserve: coordinate=arm_rot_l optimal_force=10
  CoordinateActuator elbow_flex_l_reserve: coordinate=elbow_flex_l optimal_force=1
  CoordinateActuator pro_sup_l_reserve: coordinate=pro_sup_l optimal_force=10
  CoordinateActuator wrist_flex_l_reserve: coordinate=wrist_flex_l optimal_force=10
  CoordinateActuator wrist_dev_l_reserve: coordinate=wrist_dev_l optimal_force=10
