# OpenSim document version 30000
ForceSet GenericAmputeeModel_Right_ankle_Reserve_Actuators:
  CoordinateActuator lumbar_ext
  CoordinateActuator lumbar_bend
  CoordinateActuator lumbar_rot
  CoordinateActuator shoulder_flex_r
  CoordinateActuator shoulder_add_r
  CoordinateActuator shoulder_rot_r
  CoordinateActuator elbow_flex_r
  CoordinateActuator pro_sup_r
  CoordinateActuator wrist_flex_r
  CoordinateActuator wrist_dev_r
  CoordinateActuator shoulder_flex_l
  CoordinateActuator shoulder_add_l
  CoordinateActuator shoulder_rot_l
  CoordinateActuator elbow_flex_l
  CoordinateActuator pro_sup_l
  CoordinateActuator wrist_flex_l
  CoordinateActuator wrist_dev_l
