# OpenSim document version 30000
CMC_TaskSet GenericAmputeeModel_Right_ankle_Tracking_Tasks:
  CMC_Joint [values shared by the 15 below unless stated]: active=(true false false) kp=100 kv=20
  CMC_Joint pelvis_tilt: weight=500 coordinate=pelvis_tx
  CMC_Joint pelvis_list: weight=500 coordinate=pelvis_ty
  CMC_Joint pelvis_rotation: weight=700 wrt_body=-1 express_body=-1 coordinate=pelvis_tilt
  CMC_Joint pelvis_tx: weight=250 coordinate=hip_flexion_r
  CMC_Joint pelvis_tz: weight=200 coordinate=knee_angle_r
  CMC_Joint hip_flexion_r: weight=400 coordinate=ankle_angle_r
  CMC_Joint hip_adduction_r: weight=250 coordinate=hip_flexion_l
  CMC_Joint hip_rotation_r: weight=200 coordinate=knee_angle_l
  CMC_Joint knee_angle_r: weight=400 coordinate=ankle_angle_l
  CMC_Joint ankle_angle_r: weight=500 coordinate=pelvis_tx
  CMC_Joint hip_flexion_l: weight=500 coordinate=pelvis_tx
  CMC_Joint hip_adduction_l: weight=500 coordinate=pelvis_tx
  CMC_Joint hip_rotation_l: weight=500 coordinate=pelvis_tx
  CMC_Joint knee_angle_l: weight=500 coordinate=pelvis_tx
  CMC_Joint ankle_angle_l: weight=500 coordinate=pelvis_tx
